<?xml version="1.0"?>
<?xml-stylesheet href="JSBSim.xsl" type="application/xml"?>
<fdm_config name="C-17 Globemaster III" version="2.0" release="BETA">

  <fileheader>
    <author>IH-COL, D. Waggoner, Jon Bourgeois, Adam Fothergill</author>
    <email>iahmcol@thejabberwocky.net</email>
    <filecreationdate>2022-08-22</filecreationdate>
    <description>C-17 Globemaster III: USAF Strategic Airlifter</description>
    <version>2.0</version>
  </fileheader>
  <!-- GPL version 2.0 or higher -->
  <!--
      File:     C-17.xml
      Inputs:
      name:          C-17A Globemaster III
      type:          four-engine transonic transport
      max weight:    585000 lb
      wing span:     169 ft
      length:        174 ft
      wing area:     3800 sq-ft
      gear type:     tricycle
      retractable?:  yes
      # engines:     4
      engine type:   turbine
      engine layout: wings
      yaw damper?    yes
      Outputs:
      wing loading:  153.95 lb/sq-ft
      CL-alpha:      5.0446 per radian
      CL-0:          0.2
      CL-max:        1.2
      CD-0:          0.017
      K:             0.042

  -->
  <metrics>
    <length unit="FT">173.92</length>
    <diameter unit="FT">33.67</diameter>
    <wingarea unit="FT2">3800</wingarea>
    <wingspan unit="FT">170.75</wingspan>
    <chord unit="FT">25.9</chord>
    <wing_incidence unit="DEG">3.0</wing_incidence>
    <wing_sweep unit="DEG">25.0</wing_sweep>
    <wing_anhedral unit="DEG">3.0</wing_anhedral>
    <htailarea unit="FT2">845</htailarea>
    <htailarm unit="FT">94.48</htailarm>
    <ht_sweep unit="DEG">27.0</ht_sweep>
    <ht_anhedral unit="DEG">3.0</ht_anhedral>
    <vtailarea unit="FT2">685</vtailarea>
    <vtailarm unit="FT">67.25</vtailarm>
    <vt_sweep unit="DEG">41.0</vt_sweep>
    <location name="AERORP" unit="FT">
      <x>63.21503</x>
      <y>0</y>
      <z>7.392472</z>
    </location>
    <location name="EYEPOINT" unit="FT">
      <x>7.54</x>
      <y>-2.74</y>
      <z>4.795</z>
    </location>
    <location name="VRP" unit="FT">
      <x>75.26</x>
      <y>0</y>
      <z>0</z>
    </location>
  </metrics>

  <mass_balance>
    <ixx unit="SLUG*FT2">5960958.7007</ixx>
    <iyy unit="SLUG*FT2">7090719.1211</iyy>
    <izz unit="SLUG*FT2">12871124.0727</izz>
    <ixz unit="SLUG*FT2">0.00</ixz>
    <iyz unit="SLUG*FT2">0.00</iyz>
    <ixy unit="SLUG*FT2">0.00</ixy>
    <emptywt unit="LBS">254100</emptywt>
    <location name="CG" unit="FT">
      <x>62.59203</x>
      <y>0.00</y>
      <z>7.392472</z>
    </location>
  </mass_balance>

  <pointmass name="Engine0">
    <location unit="FT">
      <x>53.2388</x>
      <y>-45.7608</y>
      <z>-1.13525</z>
    </location>
    <weight unit="LBS">7100</weight>
  </pointmass>
  <pointmass name="Engine1">
    <location unit="FT">
      <x>42.7388</x>
      <y>-24.4306</y>
      <z>1.36476</z>
    </location>
    <weight unit="LBS">7100</weight>
  </pointmass>
  <pointmass name="Engine2">
    <location unit="FT">
      <x>42.7388</x>
      <y>24.4306</y>
      <z>1.36476</z>
    </location>
    <weight unit="LBS">7100</weight>
  </pointmass>
  <pointmass name="Engine3">
    <location unit="FT">
      <x>53.2388</x>
      <y>45.7608</y>
      <z>-1.13525</z>
    </location>
    <weight unit="LBS">7100</weight>
  </pointmass>

  <ground_reactions>
    <contact type="BOGEY" name="Nose0">
      <location unit="FT">
	<x>10.672</x>
	<y>1.17831</y>
	<z>-13.2200</z>
      </location>
      <static_friction>0.85</static_friction>
      <dynamic_friction>0.5</dynamic_friction>
      <rolling_friction>0.02</rolling_friction>
      <spring_coeff unit="LBS/FT">125000</spring_coeff>
      <damping_coeff unit="LBS/FT/SEC">25000</damping_coeff>
      <max_steer unit="DEG">75</max_steer>
      <brake_group>NONE</brake_group>
      <retractable>1</retractable>
    </contact>

    <contact type="BOGEY" name="Nose1">
      <location unit="FT">
	<x>10.672</x>
	<y>-1.17831</y>
	<z>-13.2200</z>
      </location>
      <static_friction>0.85</static_friction>
      <dynamic_friction>0.5</dynamic_friction>
      <rolling_friction>0.02</rolling_friction>
      <spring_coeff unit="LBS/FT">125000</spring_coeff>
      <damping_coeff unit="LBS/FT/SEC">25500</damping_coeff>
      <max_steer unit="DEG">75</max_steer>
      <brake_group>NONE</brake_group>
      <retractable>1</retractable>
    </contact>

    <contact type="STRUCTURE" name="NoseGearStrut">
      <location unit="FT">
	<x>10.6933</x>
	<y>0.00</y>
	<z>-12.5529</z>
      </location>
      <static_friction>0.8</static_friction>
      <dynamic_friction>0.5</dynamic_friction>
      <rolling_friction>0.02</rolling_friction>
      <spring_coeff unit="LBS/FT">1.5e+06</spring_coeff>
      <damping_coeff unit="LBS/FT/SEC">60000</damping_coeff>
      <max_steer unit="DEG">0</max_steer>
      <brake_group>NONE</brake_group>
      <retractable>0</retractable>
    </contact>

    <contact type="BOGEY" name="LeftForwardMain0">
      <location unit="FT">
	<x>67.7199</x>
	<y>-13.5452</y>
	<z>-13.2278</z>
      </location>
      <static_friction>0.8</static_friction>
      <dynamic_friction>0.5</dynamic_friction>
      <rolling_friction>0.02</rolling_friction>
      <spring_coeff unit="LBS/FT">416666.67</spring_coeff>
      <damping_coeff unit="LBS/FT/SEC">83333.33</damping_coeff>
      <max_steer unit="DEG">0</max_steer>
      <brake_group>LEFT</brake_group>
      <retractable>1</retractable>
    </contact>

    <contact type="BOGEY" name="LeftForwardMain1">
      <location unit="FT">
	<x>67.7199</x>
	<y>-10.3794</y>
	<z>-13.2278</z>
      </location>
      <static_friction>0.8</static_friction>
      <dynamic_friction>0.5</dynamic_friction>
      <rolling_friction>0.02</rolling_friction>
      <spring_coeff unit="LBS/FT">416666.67</spring_coeff>
      <damping_coeff unit="LBS/FT/SEC">83333.33</damping_coeff>
      <max_steer unit="DEG">0</max_steer>
      <brake_group>LEFT</brake_group>
      <retractable>1</retractable>
    </contact>

    <contact type="BOGEY" name="LeftForwardMain2">
      <location unit="FT">
	<x>66.353</x>
	<y>-7.222</y>
	<z>-13.2278</z>
      </location>
      <static_friction>0.8</static_friction>
      <dynamic_friction>0.5</dynamic_friction>
      <rolling_friction>0.02</rolling_friction>
      <spring_coeff unit="LBS/FT">416666.67</spring_coeff>
      <damping_coeff unit="LBS/FT/SEC">83333.33</damping_coeff>
      <max_steer unit="DEG">0</max_steer>
      <brake_group>LEFT</brake_group>
      <retractable>1</retractable>
    </contact>

    <contact type="STRUCTURE" name="LeftForwardMainGearStrut">
      <location unit="FT">
	<x>67.0364</x>
	<y>-10.3836</y>
	<z>-12.3878</z>
      </location>
      <static_friction>0.8</static_friction>
      <dynamic_friction>0.5</dynamic_friction>
      <rolling_friction>0.02</rolling_friction>
      <spring_coeff unit="LBS/FT">1.5e+06</spring_coeff>
      <damping_coeff unit="LBS/FT/SEC">60000</damping_coeff>
      <max_steer unit="DEG">0</max_steer>
      <brake_group>NONE</brake_group>
      <retractable>0</retractable>
    </contact>

    <contact type="BOGEY" name="LeftRearMain0">
      <location unit="FT">
	<x>76.0847</x>
	<y>-13.5452</y>
	<z>-13.2278</z>
      </location>
      <static_friction>0.8</static_friction>
      <dynamic_friction>0.5</dynamic_friction>
      <rolling_friction>0.02</rolling_friction>
      <spring_coeff unit="LBS/FT">416666.67</spring_coeff>
      <damping_coeff unit="LBS/FT/SEC">83333.33</damping_coeff>
      <max_steer unit="DEG">0</max_steer>
      <brake_group>LEFT</brake_group>
      <retractable>1</retractable>
    </contact>

    <contact type="BOGEY" name="LeftRearMain1">
      <location unit="FT">
	<x>76.0847</x>
	<y>-10.3794</y>
	<z>-13.2278</z>
      </location>
      <static_friction>0.8</static_friction>
      <dynamic_friction>0.5</dynamic_friction>
      <rolling_friction>0.02</rolling_friction>
      <spring_coeff unit="LBS/FT">416666.67</spring_coeff>
      <damping_coeff unit="LBS/FT/SEC">83333.33</damping_coeff>
      <max_steer unit="DEG">0</max_steer>
      <brake_group>LEFT</brake_group>
      <retractable>1</retractable>
    </contact>

    <contact type="BOGEY" name="LeftRearMain2">
      <location unit="FT">
	<x>74.7178</x>
	<y>-7.222</y>
	<z>-13.2278</z>
      </location>
      <static_friction>0.8</static_friction>
      <dynamic_friction>0.5</dynamic_friction>
      <rolling_friction>0.02</rolling_friction>
      <spring_coeff unit="LBS/FT">416666.67</spring_coeff>
      <damping_coeff unit="LBS/FT/SEC">83333.33</damping_coeff>
      <max_steer unit="DEG">0</max_steer>
      <brake_group>LEFT</brake_group>
      <retractable>1</retractable>
    </contact>

    <contact type="STRUCTURE" name="LeftRearMainGearStrut">
      <location unit="FT">
	<x>76.0847</x>
	<y>-10.3836</y>
	<z>-12.3878</z>
      </location>
      <static_friction>0.8</static_friction>
      <dynamic_friction>0.5</dynamic_friction>
      <rolling_friction>0.02</rolling_friction>
      <spring_coeff unit="LBS/FT">1.5e+06</spring_coeff>
      <damping_coeff unit="LBS/FT/SEC">60000</damping_coeff>
      <max_steer unit="DEG">0</max_steer>
      <brake_group>NONE</brake_group>
      <retractable>0</retractable>
    </contact>

    <contact type="BOGEY" name="RightForwardMain0">
      <location unit="FT">
	<x>67.7199</x>
	<y>13.5452</y>
	<z>-13.2278</z>
      </location>
      <static_friction>0.8</static_friction>
      <dynamic_friction>0.5</dynamic_friction>
      <rolling_friction>0.02</rolling_friction>
      <spring_coeff unit="LBS/FT">416666.67</spring_coeff>
      <damping_coeff unit="LBS/FT/SEC">83333.33</damping_coeff>
      <max_steer unit="DEG">0</max_steer>
      <brake_group>LEFT</brake_group>
      <retractable>1</retractable>
    </contact>

    <contact type="BOGEY" name="RightForwardMain1">
      <location unit="FT">
	<x>67.7199</x>
	<y>10.3794</y>
	<z>-13.2278</z>
      </location>
      <static_friction>0.8</static_friction>
      <dynamic_friction>0.5</dynamic_friction>
      <rolling_friction>0.02</rolling_friction>
      <spring_coeff unit="LBS/FT">416666.67</spring_coeff>
      <damping_coeff unit="LBS/FT/SEC">83333.33</damping_coeff>
      <max_steer unit="DEG">0</max_steer>
      <brake_group>LEFT</brake_group>
      <retractable>1</retractable>
    </contact>

    <contact type="BOGEY" name="RightForwardMain2">
      <location unit="FT">
	<x>66.353</x>
	<y>7.222</y>
	<z>-13.2278</z>
      </location>
      <static_friction>0.8</static_friction>
      <dynamic_friction>0.5</dynamic_friction>
      <rolling_friction>0.02</rolling_friction>
      <spring_coeff unit="LBS/FT">416666.67</spring_coeff>
      <damping_coeff unit="LBS/FT/SEC">83333.33</damping_coeff>
      <max_steer unit="DEG">0</max_steer>
      <brake_group>LEFT</brake_group>
      <retractable>1</retractable>
    </contact>

    <contact type="STRUCTURE" name="RightForwardMainGearStrut">
      <location unit="FT">
	<x>67.0364</x>
	<y>10.3836</y>
	<z>-12.3878</z>
      </location>
      <static_friction>0.8</static_friction>
      <dynamic_friction>0.5</dynamic_friction>
      <rolling_friction>0.02</rolling_friction>
      <spring_coeff unit="LBS/FT">1.5e+06</spring_coeff>
      <damping_coeff unit="LBS/FT/SEC">60000</damping_coeff>
      <max_steer unit="DEG">0</max_steer>
      <brake_group>NONE</brake_group>
      <retractable>0</retractable>
    </contact>

    <contact type="BOGEY" name="RightRearMain0">
      <location unit="FT">
	<x>76.0847</x>
	<y>13.5452</y>
	<z>-13.2278</z>
      </location>
      <static_friction>0.8</static_friction>
      <dynamic_friction>0.5</dynamic_friction>
      <rolling_friction>0.02</rolling_friction>
      <spring_coeff unit="LBS/FT">416666.67</spring_coeff>
      <damping_coeff unit="LBS/FT/SEC">83333.33</damping_coeff>
      <max_steer unit="DEG">0</max_steer>
      <brake_group>LEFT</brake_group>
      <retractable>1</retractable>
    </contact>

    <contact type="BOGEY" name="RightRearMain1">
      <location unit="FT">
	<x>76.0847</x>
	<y>10.3794</y>
	<z>-13.2278</z>
      </location>
      <static_friction>0.8</static_friction>
      <dynamic_friction>0.5</dynamic_friction>
      <rolling_friction>0.02</rolling_friction>
      <spring_coeff unit="LBS/FT">416666.67</spring_coeff>
      <damping_coeff unit="LBS/FT/SEC">83333.33</damping_coeff>
      <max_steer unit="DEG">0</max_steer>
      <brake_group>LEFT</brake_group>
      <retractable>1</retractable>
    </contact>

    <contact type="BOGEY" name="RightRearMain2">
      <location unit="FT">
	<x>74.7178</x>
	<y>7.222</y>
	<z>-13.2278</z>
      </location>
      <static_friction>0.8</static_friction>
      <dynamic_friction>0.5</dynamic_friction>
      <rolling_friction>0.02</rolling_friction>
      <spring_coeff unit="LBS/FT">416666.67</spring_coeff>
      <damping_coeff unit="LBS/FT/SEC">83333.33</damping_coeff>
      <max_steer unit="DEG">0</max_steer>
      <brake_group>LEFT</brake_group>
      <retractable>1</retractable>
    </contact>

    <contact type="STRUCTURE" name="LeftRearMainGearStrut">
      <location unit="FT">
	<x>76.0847</x>
	<y>10.3836</y>
	<z>-12.3878</z>
      </location>
      <static_friction>0.8</static_friction>
      <dynamic_friction>0.5</dynamic_friction>
      <rolling_friction>0.02</rolling_friction>
      <spring_coeff unit="LBS/FT">1.5e+06</spring_coeff>
      <damping_coeff unit="LBS/FT/SEC">60000</damping_coeff>
      <max_steer unit="DEG">0</max_steer>
      <brake_group>NONE</brake_group>
      <retractable>0</retractable>
    </contact>

    <contact type="STRUCTURE" name="FuseBottomFWD">
      <location unit="FT">
	<x>14.1923</x>
	<y>0.00</y>
	<z>-8.17606</z>
      </location>
      <static_friction>0.8</static_friction>
      <dynamic_friction>0.5</dynamic_friction>
      <rolling_friction>0.02</rolling_friction>
      <spring_coeff unit="LBS/FT">1.5e+06</spring_coeff>
      <damping_coeff unit="LBS/FT/SEC">60000</damping_coeff>
      <max_steer unit="DEG">0</max_steer>
      <brake_group>NONE</brake_group>
      <retractable>0</retractable>
    </contact>

    <contact type="STRUCTURE" name="FuselageLeftBelly">
      <location unit="FT">
	<x>61.9580</x>
	<y>-12.3368</y>
	<z>-10.6629</z>
      </location>
      <static_friction>0.8</static_friction>
      <dynamic_friction>0.5</dynamic_friction>
      <rolling_friction>0.02</rolling_friction>
      <spring_coeff unit="LBS/FT">1.5e+06</spring_coeff>
      <damping_coeff unit="LBS/FT/SEC">60000</damping_coeff>
      <max_steer unit="DEG">0</max_steer>
      <brake_group>NONE</brake_group>
      <retractable>0</retractable>
    </contact>

    <contact type="STRUCTURE" name="FuselageRightBelly">
      <location unit="FT">
	<x>61.9580</x>
	<y>-12.3368</y>
	<z>-10.6629</z>
      </location>
      <static_friction>0.8</static_friction>
      <dynamic_friction>0.5</dynamic_friction>
      <rolling_friction>0.02</rolling_friction>
      <spring_coeff unit="LBS/FT">1.5e+06</spring_coeff>
      <damping_coeff unit="LBS/FT/SEC">60000</damping_coeff>
      <max_steer unit="DEG">0</max_steer>
      <brake_group>NONE</brake_group>
      <retractable>0</retractable>
    </contact>

    <contact type="STRUCTURE" name="Nose">
      <location unit="FT">
	<x>0</x>
	<y>0</y>
	<z>0</z>
      </location>
      <static_friction>0.8</static_friction>
      <dynamic_friction>0.5</dynamic_friction>
      <rolling_friction>0.02</rolling_friction>
      <spring_coeff unit="LBS/FT">1.5e+06</spring_coeff>
      <damping_coeff unit="LBS/FT/SEC">60000</damping_coeff>
      <max_steer unit="DEG">0</max_steer>
      <brake_group>NONE</brake_group>
      <retractable>0</retractable>
    </contact>

    <contact type="STRUCTURE" name="TailTip">
      <location unit="FT">
	<x>158.995</x>
	<y>0.00</y>
	<z>8.31735</z>
      </location>
      <static_friction>0.8</static_friction>
      <dynamic_friction>0.5</dynamic_friction>
      <rolling_friction>0.02</rolling_friction>
      <spring_coeff unit="LBS/FT">1.5e+06</spring_coeff>
      <damping_coeff unit="LBS/FT/SEC">60000</damping_coeff>
      <max_steer unit="DEG">0</max_steer>
      <brake_group>NONE</brake_group>
      <retractable>0</retractable>
    </contact>

    <contact type="STRUCTURE" name="FuselageTopFWD">
      <location unit="FT">
	<x>9.67421</x>
	<y>0.00</y>
	<z>8.8058</z>
      </location>
      <static_friction>0.8</static_friction>
      <dynamic_friction>0.5</dynamic_friction>
      <rolling_friction>0.02</rolling_friction>
      <spring_coeff unit="LBS/FT">1.5e+06</spring_coeff>
      <damping_coeff unit="LBS/FT/SEC">60000</damping_coeff>
      <max_steer unit="DEG">0</max_steer>
      <brake_group>NONE</brake_group>
      <retractable>0</retractable>
    </contact>

    <contact type="STRUCTURE" name="VStabTopREAR">
      <location unit="FT">
	<x>153.667</x>
	<y>0.00</y>
	<z>41.5747</z>
      </location>
      <static_friction>0.8</static_friction>
      <dynamic_friction>0.5</dynamic_friction>
      <rolling_friction>0.02</rolling_friction>
      <spring_coeff unit="LBS/FT">1.5e+06</spring_coeff>
      <damping_coeff unit="LBS/FT/SEC">60000</damping_coeff>
      <max_steer unit="DEG">0</max_steer>
      <brake_group>NONE</brake_group>
      <retractable>0</retractable>
    </contact>

    <contact type="STRUCTURE" name="WingTipLeft">
      <location unit="FT">
	<x>79.8281</x>
	<y>-83.5394</y>
	<z>2.01827</z>
      </location>
      <static_friction>0.8</static_friction>
      <dynamic_friction>0.5</dynamic_friction>
      <rolling_friction>0.02</rolling_friction>
      <spring_coeff unit="LBS/FT">1.5e+06</spring_coeff>
      <damping_coeff unit="LBS/FT/SEC">60000</damping_coeff>
      <max_steer unit="DEG">0</max_steer>
      <brake_group>NONE</brake_group>
      <retractable>0</retractable>
    </contact>

    <contact type="STRUCTURE" name="WingTipRight">
      <location unit="FT">
	<x>79.8281</x>
	<y>-83.5394</y>
	<z>2.01827</z>
      </location>
      <static_friction>0.8</static_friction>
      <dynamic_friction>0.5</dynamic_friction>
      <rolling_friction>0.02</rolling_friction>
      <spring_coeff unit="LBS/FT">1.5e+06</spring_coeff>
      <damping_coeff unit="LBS/FT/SEC">60000</damping_coeff>
      <max_steer unit="DEG">0</max_steer>
      <brake_group>NONE</brake_group>
      <retractable>0</retractable>
    </contact>

    <contact type="STRUCTURE" name="HStabLeftTip">
      <location unit="FT">
	<x>164.680</x>
	<y>-29.4253</y>
	<z>35.4397</z>
      </location>
      <static_friction>0.8</static_friction>
      <dynamic_friction>0.5</dynamic_friction>
      <rolling_friction>0.02</rolling_friction>
      <spring_coeff unit="LBS/FT">1.5e+06</spring_coeff>
      <damping_coeff unit="LBS/FT/SEC">60000</damping_coeff>
      <max_steer unit="DEG">0</max_steer>
      <brake_group>NONE</brake_group>
      <retractable>0</retractable>
    </contact>

    <contact type="STRUCTURE" name="HStabRightTip">
      <location unit="FT">
	<x>164.680</x>
	<y>29.4253</y>
	<z>35.4397</z>
      </location>
      <static_friction>0.8</static_friction>
      <dynamic_friction>0.5</dynamic_friction>
      <rolling_friction>0.02</rolling_friction>
      <spring_coeff unit="LBS/FT">1.5e+06</spring_coeff>
      <damping_coeff unit="LBS/FT/SEC">60000</damping_coeff>
      <max_steer unit="DEG">0</max_steer>
      <brake_group>NONE</brake_group>
      <retractable>0</retractable>
    </contact>

    <contact type="STRUCTURE" name="FuselageBottomRWD">
      <location unit="FT">
	<x>139.772</x>
	<y>0.00</y>
	<z>1.31936</z>
      </location>
      <static_friction>0.8</static_friction>
      <dynamic_friction>0.5</dynamic_friction>
      <rolling_friction>0.02</rolling_friction>
      <spring_coeff unit="LBS/FT">1.5e+06</spring_coeff>
      <damping_coeff unit="LBS/FT/SEC">60000</damping_coeff>
      <max_steer unit="DEG">0</max_steer>
      <brake_group>NONE</brake_group>
      <retractable>0</retractable>
    </contact>

    <contact type="STRUCTURE" name="Engine0Bottom">
      <location unit="FT">
	<x>47.7367</x>
	<y>45.7608</y>
	<z>-5.6694</z>
      </location>
      <static_friction>0.8</static_friction>
      <dynamic_friction>0.5</dynamic_friction>
      <rolling_friction>0.02</rolling_friction>
      <spring_coeff unit="LBS/FT">1.5e+06</spring_coeff>
      <damping_coeff unit="LBS/FT/SEC">60000</damping_coeff>
      <max_steer unit="DEG">0</max_steer>
      <brake_group>NONE</brake_group>
      <retractable>0</retractable>
    </contact>

    <contact type="STRUCTURE" name="Engine1Bottom">
      <location unit="FT">
	<x>35.2781</x>
	<y>24.5218</y>
	<z>-2.92671</z>
      </location>
      <static_friction>0.8</static_friction>
      <dynamic_friction>0.5</dynamic_friction>
      <rolling_friction>0.02</rolling_friction>
      <spring_coeff unit="LBS/FT">1.5e+06</spring_coeff>
      <damping_coeff unit="LBS/FT/SEC">60000</damping_coeff>
      <max_steer unit="DEG">0</max_steer>
      <brake_group>NONE</brake_group>
      <retractable>0</retractable>
    </contact>

    <contact type="STRUCTURE" name="Engine2Bottom">
      <location unit="FT">
	<x>35.2781</x>
	<y>-24.5218</y>
	<z>-2.92671</z>
      </location>
      <static_friction>0.8</static_friction>
      <dynamic_friction>0.5</dynamic_friction>
      <rolling_friction>0.02</rolling_friction>
      <spring_coeff unit="LBS/FT">1.5e+06</spring_coeff>
      <damping_coeff unit="LBS/FT/SEC">60000</damping_coeff>
      <max_steer unit="DEG">0</max_steer>
      <brake_group>NONE</brake_group>
      <retractable>0</retractable>
    </contact>

    <contact type="STRUCTURE" name="Engine3Bottom">
      <location unit="FT">
	<x>47.7367</x>
	<y>-45.7608</y>
	<z>-5.6694</z>
      </location>
      <static_friction>0.8</static_friction>
      <dynamic_friction>0.5</dynamic_friction>
      <rolling_friction>0.02</rolling_friction>
      <spring_coeff unit="LBS/FT">1.5e+06</spring_coeff>
      <damping_coeff unit="LBS/FT/SEC">60000</damping_coeff>
      <max_steer unit="DEG">0</max_steer>
      <brake_group>NONE</brake_group>
      <retractable>0</retractable>
    </contact>
  </ground_reactions>

  <propulsion>
    <engine file="F117">
      <feed>1</feed>
      <feed>3</feed>
      <thruster file="direct">
	<location unit="FT">
          <x>46.8814</x>
          <y>-45.6968</y>
          <z>-1.04424</z>
	</location>
	<orient unit="DEG">
          <roll>0</roll>
          <pitch>0</pitch>
          <yaw>0</yaw>
	</orient>
      </thruster>
    </engine>

    <engine file="F117">
      <feed>0</feed>
      <feed>1</feed>
      <thruster file="direct">
	<location unit="FT">
          <x>36.2611</x>
          <y>-24.5226</y>
          <z>1.41359</z>
	</location>
	<orient unit="DEG">
          <roll>0</roll>
          <pitch>0</pitch>
          <yaw>0</yaw>
	</orient>
      </thruster>
    </engine>

    <engine file="F117">
      <feed>0</feed>
      <feed>2</feed>
      <thruster file="direct">
	<location unit="FT">
	  <x>36.2611</x>
          <y>24.5226</y>
          <z>1.41359</z>
	</location>
	<orient unit="DEG">
          <roll>0</roll>
          <pitch>0</pitch>
          <yaw>0</yaw>
	</orient>
      </thruster>
    </engine>

    <engine file="F117">
      <feed>2</feed>
      <feed>4</feed>
      <thruster file="direct">
	<location unit="FT">
	  <x>46.8814</x>
          <y>45.6968</y>
          <z>-1.04424</z>
	</location>
	<orient unit="DEG">
          <roll>0</roll>
          <pitch>0</pitch>
          <yaw>0</yaw>
	</orient>
      </thruster>
    </engine>

    <tank type="FUEL" number="0">
      <location unit="FT">
	<x>52.06</x>
	<y>0</y>
	<z>9.56</z>
      </location>
      <capacity unit="LBS">65280</capacity>
      <contents unit="LBS">65280</contents>
    </tank>

    <tank type="FUEL" number="1">
      <location unit="FT">
	<x>62.34</x>
	<y>-26.72</y>
	<z>8.88</z>
      </location>
      <capacity unit="LBS">53992</capacity>
      <contents unit="LBS">53992</contents>
    </tank>

    <tank type="FUEL" number="2">
      <location unit="FT">
	<x>62.34</x>
	<y>26.72</y>
	<z>8.88</z>
      </location>
      <capacity unit="LBS">53992</capacity>
      <contents unit="LBS">53992</contents>
    </tank>

    <tank type="FUEL" number="3">
      <location unit="FT">
	<x>77.41</x>
	<y>-53.43</y>
	<z>6.14</z>
      </location>
      <capacity unit="LBS">38100.4</capacity>
      <contents unit="LBS">38100.4</contents>
    </tank>

    <tank type="FUEL" number="4">
      <location unit="FT">
	<x>77.41</x>
	<y>53.43</y>
	<z>6.14</z>
      </location>
      <capacity unit="LBS">38100.4</capacity>
      <contents unit="LBS">38100.4</contents>
    </tank>
  </propulsion>

  <flight_control name="FCS: C-17">
    <channel name="Pitch">
      <summer name="Pitch Trim Sum">
	<input>fcs/elevator-cmd-norm</input>
	<input>fcs/pitch-trim-cmd-norm</input>
	<clipto>
          <min>-1</min>
          <max>1</max>
	</clipto>
      </summer>

      <aerosurface_scale name="Elevator Control">
	<input>fcs/pitch-trim-sum</input>
	<range>
          <min>-0.35</min>
          <max>0.35</max>
	</range>
	<output>fcs/elevator-pos-rad</output>
      </aerosurface_scale>

      <aerosurface_scale name="elevator normalization">
	<input>fcs/elevator-pos-rad</input>
	<domain>
          <min>-0.35</min>
          <max>0.35</max>
	</domain>
	<range>
          <min>-1</min>
          <max>1</max>
	</range>
	<output>fcs/elevator-pos-norm</output>
      </aerosurface_scale>
    </channel>

    <channel name="Roll">
      <summer name="Roll Trim Sum">
	<input>fcs/aileron-cmd-norm</input>
	<input>fcs/roll-trim-cmd-norm</input>
	<clipto>
          <min>-1</min>
          <max>1</max>
	</clipto>
      </summer>

      <aerosurface_scale name="Left Aileron Control">
	<input>fcs/roll-trim-sum</input>
	<range>
          <min>-0.35</min>
          <max>0.35</max>
	</range>
	<output>fcs/left-aileron-pos-rad</output>
      </aerosurface_scale>

      <aerosurface_scale name="Right Aileron Control">
	<input>fcs/roll-trim-sum</input>
	<range>
          <min>-0.35</min>
          <max>0.35</max>
	</range>
	<output>fcs/right-aileron-pos-rad</output>
      </aerosurface_scale>

      <aerosurface_scale name="left aileron normalization">
	<input>fcs/left-aileron-pos-rad</input>
	<domain>
          <min>-0.35</min>
          <max>0.35</max>
	</domain>
	<range>
          <min>-1</min>
          <max>1</max>
	</range>
	<output>fcs/left-aileron-pos-norm</output>
      </aerosurface_scale>

      <aerosurface_scale name="right aileron normalization">
	<input>fcs/right-aileron-pos-rad</input>
	<domain>
          <min>-0.35</min>
          <max>0.35</max>
	</domain>
	<range>
          <min>-1</min>
          <max>1</max>
	</range>
	<output>fcs/right-aileron-pos-norm</output>
      </aerosurface_scale>
    </channel>

    <channel name="Yaw">
      <summer name="Rudder Command Sum">
	<input>fcs/rudder-cmd-norm</input>
	<input>fcs/yaw-trim-cmd-norm</input>
	<clipto>
          <min>-0.836332</min>
          <max>0.836332</max>
	</clipto>
	<output>fcs/rudder-command-sum</output>
      </summer>

      <aerosurface_scale name="Rudder Control">
	<input>fcs/rudder-command-sum</input>
	<range>
          <min>-0.836332</min>
          <max>0.836332</max>
	</range>
	<output>fcs/rudder-pos-rad</output>
      </aerosurface_scale>

      <aerosurface_scale name="rudder normalization">
	<input>fcs/rudder-pos-rad</input>
	<domain>
          <min>-0.836332</min>
          <max>0.836332</max>
	</domain>
	<range>
          <min>-1</min>
          <max>1</max>
	</range>
	<output>fcs/rudder-pos-norm</output>
      </aerosurface_scale>
    </channel>

    <channel name="Flaps">
      <kinematic name="Flaps Control">
	<input>fcs/flap-cmd-norm</input>
	<traverse>
          <setting>
            <position>0</position>
            <time>0</time>
          </setting>
          <setting>
            <position>15</position>
            <time>4</time>
          </setting>
          <setting>
            <position>30</position>
            <time>3</time>
          </setting>
	</traverse>
	<output>fcs/flap-pos-deg</output>
      </kinematic>

      <aerosurface_scale name="flap normalization">
	<input>fcs/flap-pos-deg</input>
	<domain>
          <min>0</min>
          <max>30</max>
	</domain>
	<range>
          <min>0</min>
          <max>1</max>
	</range>
	<output>fcs/flap-pos-norm</output>
      </aerosurface_scale>
    </channel>

    <channel name="Landing Gear">
      <kinematic name="Gear Control">
	<input>gear/gear-cmd-norm</input>
	<traverse>
          <setting>
            <position>0</position>
            <time>0</time>
          </setting>
          <setting>
            <position>1</position>
            <time>5</time>
          </setting>
	</traverse>
	<output>gear/gear-pos-norm</output>
      </kinematic>
    </channel>

    <channel name="Speedbrake">
      <kinematic name="Speedbrake Control">
	<input>fcs/speedbrake-cmd-norm</input>
	<traverse>
          <setting>
            <position>0</position>
            <time>0</time>
          </setting>
          <setting>
            <position>1</position>
            <time>1</time>
          </setting>
	</traverse>
	<output>fcs/speedbrake-pos-norm</output>
      </kinematic>
    </channel>

    <system name="NWS">
      <property>systems/NWS/engaged</property>
      <channel name="Nose Wheel Steering">
	<scheduled_gain name="systems/NWS/steer-cmd">
	  <input>fcs/rudder-cmd-norm</input>
	  <table>
	    <independentVar lookup="row">systems/NWS/engaged</independentVar>
	    <tableData>
	      0     -0.1
              1     -1.0
	    </tableData>
	  </table>
	  <output>fcs/steer-cmd-norm</output>
	</scheduled_gain>
      </channel>
    </system>
  </flight_control>

  <aerodynamics>
    <axis name="LIFT" unit="LBS">
      <function name="aero/coefficient/CLalpha">
	<description>Lift_due_to_alpha</description>
	<product>
	  <value>3.6910</value>
          <property>aero/qbar-psf</property>
          <property>metrics/Sw-sqft</property>
          <table>
            <independentVar>aero/alpha-deg</independentVar>
            <tableData>
	      -19.25	-1.1059
	      -19.00	-1.1447
	      -17.25	-1.2798
	      -15.50	-1.3132
	      -13.75	-1.2495
	      -12.00	-1.1590
	      -10.25	-1.0089
	      -8.50	-0.8409
	      -6.75	-0.6047
	      -5.00	-0.3581
	      -3.25	-0.1058
	      -1.50	0.1024
	      0.25	0.3039
	      2.00	0.4936
	      3.75	0.6913
	      5.50	0.8869
	      7.25	1.0772
	      9.00	1.2567
	      10.75	1.4210
	      12.50	1.5490
	      14.25	1.6170
	      16.00	1.6238
	      17.75	1.5223
	      18.00	1.4878
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            </tableData>
          </table>
	</product>
      </function>

      <function name="aero/coefficient/CLalpha_HS">
	<description>Lift_due_to_alpha_HS</description>
	<product>
	  <value>-1.000</value>
	  <value>2.430</value>
          <property>aero/qbar-psf</property>
          <property>metrics/Sh-sqft</property>
          <table>
            <independentVar>aero/alpha-deg</independentVar>
            <tableData>
	      -8.25	-0.6353
	      -8.00	-0.6408
	      -7.25	-0.6339
	      -6.50	-0.6073
	      -5.75	-0.5674
	      -5.00	-0.5195
	      -4.25	-0.4724
	      -3.50	-0.4048
	      -2.75	-0.3399
	      -2.00	-0.2692
	      -1.25	-0.1812
	      -0.50	-0.0914
	      0.25	0.0489
	      1.00	0.1537
	      1.75	0.2429
	      2.50	0.3157
	      3.25	0.3833
	      4.00	0.4467
	      4.75	0.5118
	      15.75	0.7620
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            </tableData>
          </table>
	</product>
      </function>

      <function name="aero/coefficient/dCLflap">
	<description>Delta_Lift_due_to_flaps</description>
	<product>
          <property>aero/qbar-psf</property>
          <property>metrics/Sw-sqft</property>
          <property>fcs/flap-pos-deg</property>
	  <value>0.00680</value>
	</product>
      </function>

      <function name="aero/coefficient/dCLsb">
	<description>Delta_Lift_due_to_speedbrake</description>
	<product>
          <property>aero/qbar-psf</property>
          <property>metrics/Sw-sqft</property>
          <property>fcs/speedbrake-pos-norm</property>
          <value>-0.05</value>
	</product>
      </function>
    </axis>

    <axis name="DRAG" unit="LBS">
      <function name="aero/coefficient/CD0">
	<description>Drag_due_to_alpha</description>
	<product>
	  <value>13.22735</value>
          <property>aero/qbar-psf</property>
          <property>metrics/Sw-sqft</property>
          <table>
            <independentVar>aero/alpha-deg</independentVar>
            <tableData>
	      -19.25	0.12730
	      -19.00	0.11529
	      -17.25	0.06356
	      -15.50	0.03861
	      -13.75	0.02777
	      -12.00	0.02031
	      -10.25	0.01604
	      -8.50	0.01338
	      -6.75	0.01099
	      -5.00	0.00904
	      -3.25	0.00575
	      -1.50	0.00538
	      0.25	0.00607
	      2.00	0.00919
	      3.75	0.01081
	      5.50	0.01240
	      7.25	0.01429
	      9.00	0.01699
	      10.75	0.02064
	      12.50	0.02634
	      14.25	0.03333
	      16.00	0.04805
	      18.00	0.09930
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            </tableData>
          </table>
	</product>
      </function>

      <function name="aero/coefficient/CD0_HS">
	<description>Drag_due_to_alpha_HS</description>
	<product>
	  <value>4.225</value>
          <property>aero/qbar-psf</property>
          <property>metrics/Sh-sqft</property>
          <table>
            <independentVar>aero/alpha-deg</independentVar>
            <tableData>
	      -19.25	0.12730
	      -19.00	0.11529
	      -17.25	0.06356
	      -15.50	0.03861
	      -13.75	0.02777
	      -12.00	0.02031
	      -10.25	0.01604
	      -8.50	0.01338
	      -6.75	0.01099
	      -5.00	0.00904
	      -3.25	0.00575
	      -1.50	0.00538
	      0.25	0.00607
	      2.00	0.00919
	      3.75	0.01081
	      5.50	0.01240
	      7.25	0.01429
	      9.00	0.01699
	      10.75	0.02064
	      12.50	0.02634
	      14.25	0.03333
	      16.00	0.04805
	      17.75	0.08823
	      18.00	0.09930
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            </tableData>
          </table>
	</product>
      </function>

      <function name="aero/coefficient/CDbeta">
	<description>Drag_due_to_sideslip_VStab</description>
	<product>
	  <value>4.425</value>
	  <property>aero/qbar-psf</property>
          <property>metrics/Sv-sqft</property>
          <table>
            <independentVar>aero/beta-deg</independentVar>
            <tableData>
	      -18.50	0.10236
	      -18.25	0.09505
	      -16.50	0.05263
	      -14.75	0.02997
	      -13.00	0.02207
	      -11.25	0.01745
	      -9.50	0.01423
	      -7.75	0.01187
	      -6.00	0.00973
	      -4.00	0.00728
	      -2.25	0.00593
	      -0.50	0.00542
	      1.25	0.00555
	      3.00	0.00640
	      4.75	0.00816
	      6.75	0.01069
	      8.50	0.01279
	      10.25	0.01566
	      12.00	0.01931
	      13.75	0.02502
	      15.50	0.03575
	      17.25	0.06802
	      18.50	0.10229
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            </tableData>
          </table>
	</product>
      </function>

      <function name="aero/coefficient/CDbetaW">
	<description>Drag_due_to_sideslip_Winglets</description>
	<product>
	  <value>1.0852</value>
	  <property>aero/qbar-psf</property>
          <value>2.000</value> <!-- Two Winglets -->
	  <value>19.44</value> <!-- Area per winglet -->
          <table>
            <independentVar>aero/beta-deg</independentVar>
            <tableData><!-- NACA 0006 -->
	      -8.75	0.0822
	      -8.50	0.0722
	      -7.75	0.0506
	      -7.00	0.0239
	      -6.25	0.0159
	      -5.50	0.0111
	      -4.75	0.0096
	      -4.00	0.0081
	      -3.25	0.0076
	      -2.50	0.0069
	      -1.75	0.0053
	      -1.00	0.0043
	      -0.25	0.0034
	      0.50	0.0037
	      1.25	0.0046
	      2.00	0.0057
	      2.75	0.0072
	      3.50	0.0077
	      4.25	0.0084
	      5.00	0.0100
	      5.75	0.0137
	      6.50	0.0171
	      7.25	0.0338
	      10.75	0.1255
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            </tableData>
          </table>
	</product>
      </function>

      <function name="aero/coefficient/CDMach">
	<description>Induced_Drag</description>
	<product>
	  <value>4.875</value>
	  <property>metrics/Sw-sqft</property>
          <table>
            <independentVar>velocities/mach</independentVar>
            <tableData>
	      0.1    0.536256037
	      0.2    0.359463171
	      0.4    0.161517214
	      0.6    0.072574363
	      0.8    0.032609763
	      1.0    0.014652511
	      1.2    0.006583798
	      1.4    0.002958291
	      1.6    0.001329246
            </tableData>
          </table>
	</product>
      </function>

      <function name="aero/coefficient/CDMachW">
	<description>Induced_Drag_Suppression_by_Winglets</description>
	<product>
	  <value>-2.000</value><!-- Drag suppression, 2 winglets -->
	  <value>19.44</value><!-- Area of each winglet -->
	  <value>0.08</value> <!-- 8 % suppressed per winglet -->
          <table>
            <independentVar>velocities/mach</independentVar>
            <tableData>
	      0.1    0.536256037
	      0.2    0.359463171
	      0.4    0.161517214
	      0.6    0.072574363
	      0.8    0.032609763
	      1.0    0.014652511
	      1.2    0.006583798
	      1.4    0.002958291
	      1.6    0.001329246
            </tableData>
          </table>
	</product>
      </function>

      <function name="aero/coefficient/CDflap">
	<description>Drag_due_to_flaps</description>
	<product>
	  <value>0.0008</value>
          <property>aero/qbar-psf</property>
          <property>metrics/Sw-sqft</property>
          <property>fcs/flap-pos-deg</property>
	</product>
      </function>

      <function name="aero/coefficient/CDsb">
	<description>Drag_due_to_speedbrakes</description>
	<product>
	  <value>0.012</value>
          <property>aero/qbar-psf</property>
          <property>metrics/Sw-sqft</property>
          <property>fcs/speedbrake-pos-norm</property>
	</product>
      </function>
    </axis>

    <axis name="SIDE" unit="LBS">
      <function name="aero/coefficient/CYb">
	<description>Side_force_due_to_beta_rudder_deflection</description>
	<product>
	  <value>-1.000</value>
	  <value>1.3596</value>
	  <property>systems/multipliers/rudder-yaw</property>
          <property>aero/qbar-psf</property>
          <property>metrics/Sv-sqft</property>
          <table>
	    <independentVar lookup="row">aero/beta-deg</independentVar>
	    <independentVar lookup="column">fcs/rudder-pos-rad</independentVar>
            <tableData>
	                -0.65	-0.436	-0.218	0.000	0.218	0.436	0.654
	      -30.00	-0.874	-0.964	-1.059	-1.091	-0.931	-0.455	-0.436
	      -27.00	-1.015	-1.121	-1.211	-1.189	-0.904	-0.304	0.036
	      -24.00	-1.183	-1.301	-1.369	-1.254	-0.823	-0.158	0.476
	      -21.00	-1.38	-1.496	-1.51	-1.269	-0.748	-0.014	0.887
	      -18.00	-1.602	-1.696	-1.62	-1.266	-0.645	0.025	1.111
	      -15.00	-1.841	-1.88	-1.689	-1.284	-0.462	0.428	1.467
	      -12.00	-2.081	-2.04	-1.953	-1.232	-0.206	0.75	1.818
	      -9.00	-2.661	-2.41	-1.825	-1.032	0.012	1.112	2.164
	      -6.00	-2.785	-2.311	-1.612	-0.694	0.379	1.47	2.452
	      -3.00	-2.75	-2.136	-1.342	-0.338	0.743	1.803	2.711
	      0.00	-2.907	-2.112	-1.101	0	1.101	1.9	2.639
	      3.00	-2.711	-1.804	-0.742	0.366	1.348	2.138	2.753
	      6.00	-2.453	-1.47	-0.378	0.727	1.618	2.317	2.787
	      9.00	-2.165	-1.112	-0.012	1.074	1.824	2.417	2.667
	      12.00	-1.819	-0.751	0.215	1.239	1.958	2.08	2.089
	      15.00	-1.468	-0.344	0.469	1.291	1.69	1.884	1.844
	      18.00	-1.112	-0.019	0.654	1.273	1.617	1.699	1.604
	      21.00	-0.62	0.018	0.766	1.275	1.514	1.5	1.381
	      24.00	-0.296	0.168	0.839	1.259	1.371	1.304	1.184
	      27.00	-0.02	0.311	0.91	1.193	1.215	1.123	1.016
	      30.00	0.189	0.46	0.936	1.095	1.06	0.966	0.875
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            </tableData>
          </table>
	</product>
      </function>

      <function name="aero/coefficient/CYbW">
	<description>Side_force_due_to_beta_Winglets</description>
	<product>
	  <value>-1.000</value>
	  <value>1.058</value>
	  <value>2.000</value> <!-- Two winglets -->
	  <value>19.44</value> <!-- Area per winglet -->
          <property>aero/qbar-psf</property>
          <table>
            <independentVar>aero/beta-deg</independentVar>
            <tableData> <!-- NACA 0006 -->
	      -8.75	-0.7405
	      -8.50	-0.7508
	      -7.75	-0.7462
	      -7.00	-0.7345
	      -6.25	-0.6709
	      -5.50	-0.6001
	      -4.75	-0.5225
	      -4.00	-0.4448
	      -3.25	-0.3662
	      -2.50	-0.2890
	      -1.75	-0.2142
	      -1.00	-0.1251
	      -0.25	-0.0237
	      0.50	0.0528
	      1.25	0.1609
	      2.00	0.2394
	      2.75	0.3143
	      3.50	0.3921
	      4.25	0.4709
	      5.00	0.5487
	      5.75	0.6211
	      6.50	0.6954
	      7.25	0.7383
	      10.75	0.7174
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            </tableData>
          </table>
	</product>
      </function>
    </axis>

    <axis name="ROLL" unit="LBS*FT">
      <function name="aero/coefficient/Clb">
	<description>Roll_moment_due_to_beta</description>
	<product>
	  <value>-1.000</value>
	  <value>0.100</value>
          <property>aero/qbar-psf</property>
          <property>metrics/Sw-sqft</property>
          <property>metrics/bw-ft</property>
          <property>aero/beta-rad</property>
	</product>
      </function>

      <function name="aero/coefficient/Clp">
	<description>Roll_moment_due_to_roll_rate</description>
	<product>
	  <value>-1.000</value>
	  <value>0.485</value>
          <property>aero/qbar-psf</property>
          <property>metrics/Sw-sqft</property>
          <property>metrics/bw-ft</property>
          <property>aero/bi2vel</property>
          <property>velocities/p-aero-rad_sec</property>
	</product>
      </function>

      <function name="aero/coefficient/Clr">
	<description>Roll_moment_due_to_yaw_rate</description>
	<product>
	  <value>0.166</value>
          <property>aero/qbar-psf</property>
          <property>metrics/Sw-sqft</property>
          <property>metrics/bw-ft</property>
          <property>aero/bi2vel</property>
          <property>velocities/r-aero-rad_sec</property>
	</product>
      </function>

      <function name="aero/coefficient/Clda">
	<description>Roll_moment_due_to_aileron</description>
	<product>
	  <value>0.480</value> <!-- Aileron power on roll -->
          <property>aero/qbar-psf</property>
          <property>metrics/Sw-sqft</property>
          <property>metrics/bw-ft</property>
          <table>
            <independentVar>fcs/left-aileron-pos-rad</independentVar>
            <tableData>
	      -0.5236	-0.0487
	      -0.4363	-0.0449
	      -0.3491	-0.0398
	      -0.2618	-0.0302
	      -0.1745	-0.0197
	      -0.0873	-0.0094
	      0.0000	0.0000
	      0.0873	0.0094
	      0.1745	0.0197
	      0.2618	0.0302
	      0.3491	0.0398
	      0.4363	0.0449
	      0.5236	0.0487
	    </tableData>
          </table>
	</product>
      </function>
    </axis>

    <axis name="PITCH" unit="LBS*FT">
      <function name="aero/coefficient/Cmalpha">
	<description>Pitch_moment_due_to_alpha</description>
	<product>
	  <value>-1.000</value>
	  <value>1.256</value>
          <property>aero/qbar-psf</property>
          <property>metrics/Sw-sqft</property>
          <property>metrics/cbarw-ft</property>
          <table>
            <independentVar>aero/alpha-deg</independentVar>
            <tableData>
	      -19.25	-0.0058
	      -19.00	-0.0127
	      -17.25	-0.0413
	      -15.50	-0.0482
	      -13.75	-0.0465
	      -12.00	-0.0418
	      -10.25	-0.0404
	      -8.50	-0.0388
	      -6.75	-0.0503
	      -5.00	-0.0630
	      -3.25	-0.0783
	      -1.50	-0.0798
	      0.25	-0.0793
	      2.00	-0.0784
	      3.75	-0.0787
	      5.50	-0.0784
	      7.25	-0.0772
	      9.00	-0.0743
	      10.75	-0.0693
	      12.50	-0.0595
	      14.25	-0.0426
	      16.00	-0.0316
	      17.75	-0.0468
	      18.00	-0.0533
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            </tableData>
          </table>
	</product>
      </function>

      <function name="aero/coefficient/Cmalpha_HS">
	<description>Pitch_moment_due_to_alpha_HS</description>
	<product>
	  <value>4.753785</value> <!-- Pitch up moment tampers here -->
          <property>aero/qbar-psf</property>
          <property>metrics/Sh-sqft</property>
          <property>metrics/lh-ft</property>
          <table>
            <independentVar>aero/alpha-deg</independentVar>
            <tableData>
	      -19.25	-0.0058
	      -19.00	-0.0127
	      -17.25	-0.0413
	      -15.50	-0.0482
	      -13.75	-0.0465
	      -12.00	-0.0418
	      -10.25	-0.0404
	      -8.50	-0.0388
	      -6.75	-0.0503
	      -5.00	-0.0630
	      -3.25	-0.0783
	      -1.50	-0.0798
	      0.25	-0.0793
	      2.00	-0.0784
	      3.75	-0.0787
	      5.50	-0.0784
	      7.25	-0.0772
	      9.00	-0.0743
	      10.75	-0.0693
	      12.50	-0.0595
	      14.25	-0.0426
	      16.00	-0.0316
	      17.75	-0.0468
	      18.00	-0.0533
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            </tableData>
          </table>
	</product>
      </function>

      <function name="aero/coefficient/Cmde">
	<description>Pitch_moment_due_to_elevator</description>
	<product>
	  <value>2.0625</value><!-- Elevator deflection power factor -->
          <property>aero/qbar-psf</property>
          <property>metrics/Sh-sqft</property>
          <property>metrics/lh-ft</property>
	  <table>
	    <independentVar lookup="row">aero/alpha-deg</independentVar>
	    <independentVar lookup="column">fcs/elevator-pos-rad</independentVar>
	    <tableData>
	                -0.2618	-0.1745	-0.0873	0.0000	0.0873	0.1745	0.2618
	      -25.0	-0.1777	-0.2745	-0.3440	-0.3644	-0.4158	-0.4853	-0.5821
	      -15.0	0.0836	-0.0479	-0.1256	-0.1618	-0.2066	-0.2843	-0.4158
	      0.0	0.4338	0.2837	0.1852	0.1627	0.0985	0.0000	-0.1501
	      10.0	0.6152	0.4817	0.3880	0.3639	0.2840	0.1903	0.0568
	      20.0	0.8556	0.7129	0.6152	0.5902	0.4859	0.3882	0.2455
            </tableData>
          </table>
	</product>
      </function>

      <function name="aero/coefficient/Cmq">
	<description>Pitch_moment_due_to_pitch_rate</description>
	<product>
	  <value>-1.000</value>
	  <value>125</value>
          <property>aero/qbar-psf</property>
          <property>metrics/Sw-sqft</property>
          <property>metrics/cbarw-ft</property>
          <property>aero/ci2vel</property>
          <property>velocities/q-aero-rad_sec</property>
	</product>
      </function>

      <function name="aero/coefficient/Cmadot">
	<description>Pitch_moment_due_to_alpha_rate</description>
	<product>
	  <value>-1.000</value>
	  <value>18</value>
          <property>aero/qbar-psf</property>
          <property>metrics/Sw-sqft</property>
          <property>metrics/cbarw-ft</property>
          <property>aero/ci2vel</property>
          <property>aero/alphadot-rad_sec</property>
	</product>
      </function>
    </axis>

    <axis name="YAW" unit="LBS*FT">
      <function name="aero/coefficient/Cnb">
	<description>Yaw_moment_due_to_beta</description>
	<product>
	  <value>5.218</value>
          <property>aero/qbar-psf</property>
          <property>metrics/Sh-sqft</property>
          <property>metrics/bw-ft</property>
          <table>
            <independentVar>aero/beta-deg</independentVar>
	    <tableData>
	      -18.50	-0.0012
	      -18.25	-0.0049
	      -16.50	-0.0261
	      -14.75	-0.0305
	      -13.00	-0.0187
	      -11.25	-0.0101
	      -9.50	-0.0034
	      -7.75	0.0052
	      -6.00	0.0041
	      -4.00	-0.0061
	      -2.25	-0.0034
	      -0.50	-0.0007
	      1.25	0.0018
	      3.00	0.0048
	      4.75	0.0038
	      6.75	-0.0089
	      8.50	-0.0013
	      10.25	0.0066
	      12.00	0.0133
	      13.75	0.0251
	      15.50	0.0315
	      17.25	0.0182
	      18.50	0.0008
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	    </tableData>
	  </table>
	</product>
      </function>

      <function name="aero/coefficient/CnbW">
	<description>Yaw_moment_due_to_beta_Winglets</description>
	<product>
	  <value>2.000</value> <!-- Two Winglets -->
	  <value>0.000</value> <!-- Nullify moments per symmetrical effect -->
	  <value>19.44</value> <!-- Winglet Area -->
	  <value>170.000</value> <!-- Wingspan -->
          <property>aero/qbar-psf</property>
          <table>
            <independentVar>aero/beta-deg</independentVar>
	    <tableData> <!-- NACA 0006 -->
	      -8.75	0.0149
	      -8.50	0.0032
	      -7.75	-0.0090
	      -7.00	-0.0071
	      -6.25	-0.0043
	      -5.50	-0.0018
	      -4.75	-0.0007
	      -4.00	0.0007
	      -3.25	0.0016
	      -2.50	0.0029
	      -1.75	0.0038
	      -1.00	0.0020
	      -0.25	-0.0015
	      0.50	0.0016
	      1.25	-0.0039
	      2.00	-0.0035
	      2.75	-0.0024
	      3.50	-0.0012
	      4.25	-0.0003
	      5.00	0.0010
	      5.75	0.0031
	      6.50	0.0048
	      7.25	0.0091
	      10.75	-0.0379
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	    </tableData>
	  </table>
	</product>
      </function>

      <function name="aero/coefficient/Cndr">
	<description>Yaw_moment_due_to_rudder</description>
	<product>
	  <value>-1.000</value>
	  <value>2.850</value><!-- Rudder deflection power factor -->
          <property>aero/qbar-psf</property>
          <property>metrics/Sv-sqft</property>
          <property>metrics/bw-ft</property>
	  <table>
	    <independentVar lookup="row">aero/beta-deg</independentVar>
	    <independentVar lookup="column">fcs/rudder-pos-rad</independentVar>
	    <tableData>
	      -0.314	-0.244	-0.209	-0.070	0.000	0.070	0.209	0.244	0.314
	      -30	0.0065	0.0065	0.0170	0.0588	0.0795	0.1002	0.1420	0.1524	0.1524
	      -25	0.0115	0.0115	0.0213	0.0602	0.0794	0.0987	0.1377	0.1474	0.1474
	      -20	-0.0109	-0.0109	0.0004	0.0450	0.0671	0.0892	0.1338	0.1450	0.1450
	      -15	-0.0035	-0.0035	0.0062	0.0449	0.0641	0.0833	0.1220	0.1317	0.1317
	      -10	-0.0607	-0.0607	-0.0479	0.0032	0.0286	0.0539	0.1051	0.1178	0.1178
	      -5	-0.0779	-0.0779	-0.0650	-0.0137	0.0118	0.0373	0.0887	0.1016	0.1016
	      0 	-0.0853	-0.0853	-0.0731	-0.0243	0.0000	0.0243	0.0731	0.0853	0.0853
	      5	        -0.0927	-0.0927	-0.0812	-0.0349	-0.0118	0.0113	0.0575	0.0691	0.0691
	      10	-0.1100	-0.1100	-0.0983	-0.0518	-0.0286	-0.0053	0.0412	0.0528	0.0528
	      15	-0.1671	-0.1671	-0.1524	-0.0935	-0.0641	-0.0347	0.0242	0.0390	0.0390
	      20	-0.1598	-0.1598	-0.1466	-0.0936	-0.0671	-0.0406	0.0125	0.0257	0.0257
	      25	-0.1821	-0.1821	-0.1675	-0.1088	-0.0794	-0.0501	0.0086	0.0233	0.0233
	      30	-0.1772	-0.1772	-0.1632	-0.1074	-0.0795	-0.0516	0.0043	0.0182	0.0182
            </tableData>
          </table>
	</product>
      </function>

      <function name="aero/coefficient/Cnbdot">
	<description>Yaw_moment_due_to_beta_rate</description>
	<product>
	  <value>-1.000</value>
	  <value>2.000</value>
          <property>aero/qbar-psf</property>
          <property>metrics/Sv-sqft</property>
          <property>metrics/bw-ft</property>
          <property>aero/ci2vel</property>
          <property>aero/betadot-rad_sec</property>
	</product>
      </function>

      <function name="aero/coefficient/Cnr">
	<description>Yaw_moment_due_to_yaw_rate</description>
	<product>
	  <value>-1.000</value>
	  <value>0.8321</value>
          <property>aero/qbar-psf</property>
          <property>metrics/Sv-sqft</property>
          <property>metrics/bw-ft</property>
          <property>aero/bi2vel</property>
          <property>velocities/r-aero-rad_sec</property>
	</product>
      </function>

      <function name="aero/coefficient/Cnda">
	<description>Yaw_moment_due_to_aileron</description>
	<product>
	  <value>0.300</value> <!-- Aileron power on yaw  -->
          <property>aero/qbar-psf</property>
          <property>metrics/Sv-sqft</property>
          <property>metrics/bw-ft</property>
	  <table>
            <independentVar>fcs/left-aileron-pos-rad</independentVar>
            <tableData>
	      -0.5236	-0.3027
	      -0.4363	-0.2394
	      -0.3491	-0.1792
	      -0.2618	-0.1324
	      -0.1745	-0.0858
	      -0.0873	-0.0436
	      0.0000	0.0000
	      0.0873	0.0436
	      0.1745	0.0858
	      0.2618	0.1324
	      0.3491	0.1792
	      0.4363	0.2394
	      0.5236	0.3027
	    </tableData>
          </table>
	</product>
      </function>
    </axis>
  </aerodynamics>

  <output name="C-17-jsbim-output.csv" type="CSV" rate="100">
    <simulation>OFF</simulation>
    <atmosphere>OFF</atmosphere>
    <massprops>OFF</massprops>
    <aerosurfaces>OFF</aerosurfaces>
    <rates>OFF</rates>
    <velocities>OFF</velocities>
    <forces>OFF</forces>
    <moments>OFF</moments>
    <position>OFF</position>
    <coefficients>OFF</coefficients>
    <ground_reactions>OFF</ground_reactions>
    <fcs>OFF</fcs>
    <propulsion>OFF</propulsion>
  </output>
</fdm_config>
