<?xml version="1.0"?>
<!--
    File:     F117.xml
    Author:   Modified by IH-COL

Inputs:
name:           F117-PW-100
type:           Turbine
thrust:         40440 lb
augmented?:     no
injected?:      no
-->

<turbine_engine name="F117">
  <milthrust>44480.0</milthrust> <!-- at EPR 1.91 reaches rated 404400 lbs-->
  <bypassratio>5.9</bypassratio>
  <tsfc>0.33</tsfc>
  <bleed>0.03</bleed>
  <idlen1>30.0</idlen1>
  <idlen2>60.0</idlen2>
  <maxn1>100.0</maxn1>
  <maxn2>100.0</maxn2>
  <augmented>0</augmented>
  <injected>0</injected>

  <function name="IdleThrust">
    <table>
      <independentVar lookup="row">velocities/mach</independentVar>
      <independentVar lookup="column">atmosphere/density-altitude</independentVar>
      <tableData>
	        -10000	0	10000	20000	30000	36000	40000	50000	60000
	0	0.0519	0.0488	0.0457	0.04265	0.0395	0.03802	0.03127	0.01448	0.000560
	0.2	0.04778	0.04575	0.04371	0.04135	0.03872	0.03724	0.03081	0.0142	0.000280
	0.4	0.04681	0.04515	0.04348	0.04135	0.03881	0.03733	0.0309	0.01429	0.000370
	0.6	0.04824	0.04653	0.04482	0.04256	0.03978	0.0383	0.03159	0.01471	0.000790
	0.8	0.05181	0.04973	0.04764	0.04487	0.04158	0.0401	0.03284	0.01545	0.001530
	1	0.05694	0.05435	0.05176	0.04806	0.04427	0.04279	0.03469	0.01661	0.002690
	1.2	0.06231	0.05944	0.05657	0.05236	0.0475	0.04602	0.03696	0.01799	0.004070
	1.4	0.06735	0.06453	0.06171	0.05703	0.05134	0.04986	0.03973	0.01975	0.005830
      </tableData>
    </table>
  </function>

  <function name="MilThrust">
    <table>
      <independentVar lookup="row">velocities/mach</independentVar>
      <independentVar lookup="column">atmosphere/density-altitude</independentVar>
      <tableData>
	       -10000	0	10000	20000	30000	36000	40000	50000	60000
	0	1.122	1.055	0.988	0.922	0.854	0.822	0.676	0.313	0.02512
	0.2	1.033	0.989	0.945	0.894	0.837	0.805	0.666	0.307	0.01912
	0.4	1.012	0.976	0.94	0.894	0.839	0.807	0.668	0.309	0.02112
	0.6	1.043	1.006	0.969	0.92	0.86	0.828	0.683	0.318	0.03012
	0.8	1.12	1.075	1.03	0.97	0.899	0.867	0.71	0.334	0.04612
	1	1.231	1.175	1.119	1.039	0.957	0.925	0.75	0.359	0.07112
	1.2	1.347	1.285	1.223	1.132	1.027	0.995	0.799	0.389	0.10112
	1.4	1.456	1.395	1.334	1.233	1.11	1.078	0.859	0.427	0.13912
      </tableData>
    </table>
  </function>

</turbine_engine>
